*Heading
** Job name: CPS8R_4_24 Model name: Assignment1
** Generated by: Abaqus/CAE 2016
*Preprint, echo=NO, model=NO, history=NO, contact=NO
**
** PARTS
**
*Part, name=PartAssignment1
*Node
      1,         200.,          -5.
      2,        187.5,          -5.
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*Element, type=CPS8R
 1,   1,   2,  27,  26, 126, 127, 128, 129
 2,   2,   3,  28,  27, 130, 131, 132, 127
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*Nset, nset=Set-1, generate
   1,  345,    1
*Elset, elset=Set-1, generate
  1,  96,   1
** Section: SectionAssignment1
*Solid Section, elset=Set-1, material=steel
5.,
*End Part
**
**
** ASSEMBLY
**
*Assembly, name=Assembly
**
*Instance, name=PartAssignment1-1, part=PartAssignment1
*End Instance
**
*Nset, nset=Set-1, instance=PartAssignment1-1
  25,  50,  75, 100, 125, 197, 246, 295, 344
*Elset, elset=Set-1, instance=PartAssignment1-1, generate
 24,  96,  24
*Nset, nset=Set-2, instance=PartAssignment1-1
 101,
*Nset, nset=Set-3, instance=PartAssignment1-1
 1,
*End Assembly
**
** MATERIALS
**
*Material, name=steel
*Elastic
90000., 0.3
**
** BOUNDARY CONDITIONS
**
** Name: FixLeftEnd Type: Symmetry/Antisymmetry/Encastre
*Boundary
Set-1, ENCASTRE
** ----------------------------------------------------------------
**
** STEP: Load
**
*Step, name=Load, nlgeom=NO
load of assignment1
*Static
1., 1., 1e-05, 1.
**
** LOADS
**
** Name: Load-1   Type: Concentrated force
*Cload
Set-2, 2, -25.
** Name: Load-2   Type: Concentrated force
*Cload
Set-3, 2, -25.
**
** OUTPUT REQUESTS
**
*Restart, write, frequency=0
**
** FIELD OUTPUT: F-Output-1
**
*Output, field
*Node Output
RF, U
*Element Output, directions=YES
S,
**
** HISTORY OUTPUT: H-Output-1
**
*Output, history, variable=PRESELECT
*End Step
