*Heading
** Job name: Global_Model Model name: Model-1
** Generated by: Abaqus/CAE 2016
*Preprint, echo=NO, model=NO, history=NO, contact=NO
**
** PARTS
**
*Part, name=assignment2
*Node
      1,         -70.,          -5.
      2,         -50.,          -5.
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*Element, type=CPS8R
  1,   1,   9, 129,  64, 337, 338, 339, 340
  2,   9,  10, 130, 129, 341, 342, 343, 338
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*Nset, nset=Set-1, generate
   1,  946,    1
*Elset, elset=Set-1, generate
   1,  275,    1
** Section: Section_assignment2
*Solid Section, elset=Set-1, material=steel
2.,
*End Part
**
**
** ASSEMBLY
**
*Assembly, name=Assembly
**
*Instance, name=assignment2-1, part=assignment2
*End Instance
**
*Nset, nset=Set-1, instance=assignment2-1
   3,   4,  37,  38,  39,  40, 607, 610, 612, 614, 616
*Elset, elset=Set-1, instance=assignment2-1, generate
 121,  125,    1
*Nset, nset=Set-2, instance=assignment2-1
 8,
*Nset, nset=Set-3, instance=assignment2-1
 7,
*End Assembly
**
** MATERIALS
**
*Material, name=steel
*Elastic
210000., 0.3
*Plastic
500.,0.
** ----------------------------------------------------------------
**
** STEP: Step-1
**
*Step, name=Step-1, nlgeom=NO
*Static
1., 1., 1e-05, 1.
**
** BOUNDARY CONDITIONS
**
** Name: BC-1 Type: Symmetry/Antisymmetry/Encastre
*Boundary
Set-1, ENCASTRE
**
** LOADS
**
** Name: Load-1   Type: Concentrated force
*Cload
Set-2, 2, -250.
** Name: Load-2   Type: Concentrated force
*Cload
Set-3, 2, -250.
**
** OUTPUT REQUESTS
**
*Restart, write, frequency=0
**
** FIELD OUTPUT: F-Output-1
**
*Output, field
*Node Output
RF, U
*Element Output, directions=YES
NFORC, S
**
** HISTORY OUTPUT: H-Output-1
**
*Output, history, variable=PRESELECT
*End Step
