*Heading
** Job name: Submodel_AB_5-job Model name: Submodel_AB_5mm
** Generated by: Abaqus/CAE 2016
*Preprint, echo=NO, model=NO, history=NO, contact=NO
**
** PARTS
**
*Part, name=assignment2
*Node
      1,         -45.,          -5.
      2,         -45.,         -25.
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*Element, type=CPS8R
  1,   1,  13, 133,  48, 412, 413, 414, 415
  2,  13,  14, 134, 133, 416, 417, 418, 413
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*Element, type=CPS6M
361,   10,  128,  132, 1127, 1178, 1179
362,   60,    1,  129,  685, 1180, 1181
363,  130,  131,   61, 1182, 1183, 1184
*Nset, nset=Set-1, generate
    1,  1187,     1
*Elset, elset=Set-1, generate
   1,  366,    1
** Section: Section_assignment2
*Solid Section, elset=Set-1, material=steel
2.,
*End Part
**
**
** ASSEMBLY
**
*Assembly, name=Assembly
**
*Instance, name=assignment2-1, part=assignment2
*End Instance
**
*Nset, nset=Set-4, instance=assignment2-1
   11,   12,  107,  108,  109,  110
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*Elset, elset=Set-4, instance=assignment2-1, generate
 321,  330,    1
*Elset, elset=_Surf-1_S3, internal, instance=assignment2-1, generate
  91,  100,    1
*Surface, type=ELEMENT, name=Surf-1
_Surf-1_S3, S3
*Submodel, type=NODE, exteriorTolerance=0.05
Set-4,
*Submodel, type=SURFACE, exteriorTolerance=0.05
Surf-1,
*End Assembly
**
** MATERIALS
**
*Material, name=steel
*Elastic
210000., 0.3
*Plastic
500.,0.
** ----------------------------------------------------------------
**
** STEP: Step-1
**
*Step, name=Step-1, nlgeom=NO
*Static
1., 1., 1e-05, 1.
**
** BOUNDARY CONDITIONS
**
** Name: BC-1 Type: Submodel
*Boundary, submodel, step=1
Set-4, 1, 1
Set-4, 2, 2
**
** LOADS
**
** Name: Load-1   Type: Submodel
*Dsload, submodel, step=1
Surf-1
**
** OUTPUT REQUESTS
**
*Restart, write, frequency=0
**
** FIELD OUTPUT: F-Output-1
**
*Output, field
*Node Output
RF, U
*Element Output, directions=YES
NFORC, S
**
** HISTORY OUTPUT: H-Output-1
**
*Output, history, variable=PRESELECT
*End Step
