*Heading
** Job name: cpe4_surfaceToSurface_finite_sliding Model name: Model-1
** Generated by: Abaqus/CAE 2016
*Preprint, echo=NO, model=NO, history=NO, contact=NO
**
** PARTS
**
*Part, name=plate
*Node
      1,        -250.,          75.
      2,        -250.,         125.
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*Element, type=CPE4
  1,   1,   7, 127,  68
  2,   7,   8, 128, 127
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*Nset, nset=Set-1, generate
   1,  342,    1
*Elset, elset=Set-1, generate
   1,  280,    1
*Nset, nset=Set-20, generate
   1,  342,    1
*Elset, elset=Set-20, generate
   1,  280,    1
** Section: Section-plate
*Solid Section, elset=Set-20, material=Material-plate
1600.,
*End Part
**
*Part, name=rigid_press
*End Part
**
**
** ASSEMBLY
**
*Assembly, name=Assembly
**
*Instance, name=rigid_press-1, part=rigid_press
        150.,         325.,           0.
*Node
      1,        -400.,        -200.,           0.
*Nset, nset=rigid_press-1-RefPt_, internal
1,
*Surface, type=SEGMENTS, name=Surf-3
START,        -550.,        -197.
 LINE,        -550.,         200.
 LINE,        -250.,         200.
 LINE,        -250.,        -197.
 CIRCL,        -253.,        -200.,        -253.,        -197.
 LINE,        -547.,        -200.
 CIRCL,        -550.,        -197.,        -547.,        -197.
*End Instance
**
*Instance, name=plate-1, part=plate
*End Instance
**
*Nset, nset=Set-3, instance=plate-1
 1,
*Nset, nset=Set-4, instance=plate-1
  1,  4,  5, 42, 43, 44
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*Elset, elset=Set-4, instance=plate-1
   1,   6,  11,  16,  21,  26
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*Nset, nset=Set-5, instance=rigid_press-1
 1,
*Nset, nset=_PickedSet24, internal, instance=rigid_press-1
 1,
*Elset, elset=_s_Surf-1_S2, internal, instance=plate-1, generate
   5,  140,    5
*Elset, elset=_s_Surf-1_S4, internal, instance=plate-1, generate
 141,  276,    5
*Surface, type=ELEMENT, name=s_Surf-1
_s_Surf-1_S2, S2
_s_Surf-1_S4, S4
** Constraint: press_part
*Rigid Body, ref node=_PickedSet24, analytical surface=rigid_press-1.Surf-3
*End Assembly
**
** MATERIALS
**
*Material, name=Material-plate
*Elastic
70000., 0.3
*Plastic
 50.,          0.
220., 3.01071e-05
240., 3.41071e-05
260.,  0.00031343
280.,  0.00114718
300.,  0.00288029
320.,  0.00588232
340.,   0.0105421
360.,   0.0172647
380.,   0.0264687
400.,   0.0385852
420.,   0.0540561
440.,   0.0733333
460.,   0.0968779
480.,    0.125159
500.,    0.158655
520.,     0.19785
540.,    0.243237
560.,    0.295312
580.,    0.354582
600.,    0.421557
620.,    0.496753
640.,    0.580693
660.,    0.673903
680.,    0.776916
700.,        0.87
**
** INTERACTION PROPERTIES
**
*Surface Interaction, name=IntProp-1
1.,
*Friction
0.,
*Surface Behavior, no separation, pressure-overclosure=HARD
**
** INTERACTIONS
**
** Interaction: Int-1
*Contact Pair, interaction=IntProp-1, type=SURFACE TO SURFACE
s_Surf-1, rigid_press-1.Surf-3
** ----------------------------------------------------------------
**
** STEP: My_Step
**
*Step, name=My_Step, nlgeom=YES, inc=5000
*Static
0.1, 0.1, 1e-06, 0.1
**
** BOUNDARY CONDITIONS
**
** Name: BC-2 Type: Symmetry/Antisymmetry/Encastre
*Boundary
Set-3, XSYMM
** Name: BC-3 Type: Symmetry/Antisymmetry/Encastre
*Boundary
Set-4, YSYMM
** Name: BC-4 Type: Displacement/Rotation
*Boundary
Set-5, 1, 1
Set-5, 2, 2, -25.
Set-5, 6, 6
**
** OUTPUT REQUESTS
**
*Restart, write, frequency=0
**
** FIELD OUTPUT: F-Output-1
**
*Output, field, variable=PRESELECT
**
** HISTORY OUTPUT: H-Output-1
**
*Output, history, variable=PRESELECT
*End Step
