*Heading
** Job name: CPS4_hyperplastic Model name: Model-1
** Generated by: Abaqus/CAE 2016
*Preprint, echo=NO, model=NO, history=NO, contact=NO
**
** PARTS
**
*Part, name=Part-1
*End Part
**
**
** ASSEMBLY
**
*Assembly, name=Assembly
**
*Instance, name=Part-1-4, part=Part-1
*Node
      1,        -22.5,         8.75
      2,        -22.5,        -1.25
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*Element, type=CPS4R
 1,   1,  19, 193,  43
 2,  19,  20, 194, 193
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*Element, type=CPS3
369, 165, 156, 155
370, 160, 479, 159
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*Nset, nset=Set-19, generate
   1,  513,    1
*Elset, elset=Set-19, generate
   1,  462,    1
** Section: Section-1
*Solid Section, elset=Set-19, material=hyperplastic
1.,
*End Instance
**
*Node
      1,         -21.,        18.75,           0.
*Nset, nset=Set-6, instance=Part-1-4
  13,  14, 109, 110, 111, 112, 113, 114, 115, 116, 117, 118, 119
*Elset, elset=Set-6, instance=Part-1-4, generate
 214,  324,   10
*Nset, nset=Set-7, instance=Part-1-4
  8,  9, 59, 60, 61, 62, 63, 64, 65, 66, 67, 68, 69
*Elset, elset=Set-7, instance=Part-1-4, generate
 153,  164,    1
*Nset, nset=Set-8
 1,
*Nset, nset=m_Set-8
 1,
*Elset, elset=_s_Surf-2_S3, internal, instance=Part-1-4, generate
 153,  164,    1
*Surface, type=ELEMENT, name=s_Surf-2
_s_Surf-2_S3, S3
** Constraint: Constraint-1
*Coupling, constraint name=Constraint-1, ref node=m_Set-8, surface=s_Surf-2
*Kinematic
*End Assembly
**
** MATERIALS
**
*Material, name=hyperplastic
*Hyperelastic, neo hooke
*INCLUDE, INPUT=coefficient.inp

** ----------------------------------------------------------------
**
** STEP: Step-1
**
*Step, name=Step-1, nlgeom=YES
*Static
0.1, 1., 1e-05, 1.
**
** BOUNDARY CONDITIONS
**
** Name: BC-1 Type: Symmetry/Antisymmetry/Encastre
*Boundary
Set-6, ENCASTRE
** Name: BC-2 Type: Displacement/Rotation
*Boundary
Set-8, 1, 1
Set-8, 2, 2, 20.
Set-8, 6, 6
**
** OUTPUT REQUESTS
**
*Restart, write, frequency=0
**
** FIELD OUTPUT: F-Output-1
**
*Output, field
*Node Output
CF, RF, RT, U
*Element Output, directions=YES
S,
**
** HISTORY OUTPUT: H-Output-1
**
*Output, history, variable=PRESELECT
*NODE PRINT, NSET=m_Set-8, FREQ=1
U2,RF2
*End Step
